<?xml version="1.0" encoding="UTF-8"?>
<channelml xmlns="http://morphml.org/channelml/schema" xmlns:xsi="http://www.w3.org/2001/XMLSchema-instance" xmlns:meta="http://morphml.org/metadata/schema" xsi:schemaLocation="http://morphml.org/channelml/schema  http://www.neuroml.org/NeuroMLValidator/NeuroMLFiles/Schemata/v1.8.1/Level2/ChannelML_v1.8.1.xsd" units="Physiological Units">

    <meta:notes>A channel from M. C. Vanier and J. M. Bower (1999) A Comparative Survey of Automated Parameter-Searching Methods for Compartmental Neural Models</meta:notes>

    <channel_type name="Piriform_KA_ChannelML">

        <status value="stable">
            <meta:comment>Equations require conversion</meta:comment>
            <meta:contributor>
                <meta:name>Simon O'Connor</meta:name>
            </meta:contributor>
        </status>

        <meta:notes>A-type K channel, with rate equations expressed in tau and inf form</meta:notes>

            <meta:modelTranslator>
                <meta:name>Simon O'Connor</meta:name>
                <meta:institution>Cardiff University</meta:institution>
                <meta:email>simon.oconnor - at - btinternet.com</meta:email>
            </meta:modelTranslator>

        <meta:publication>
           <meta:fullTitle>M. C. Vanier and J. M. Bower (1999) A Comparative Survey of Automated Parameter-Searching Methods for Compartmental Neural Models. Journal of Computational Neuroscience 7, 149-171.</meta:fullTitle>
           <meta:pubmedRef>http://www.ncbi.nlm.nih.gov/entrez/query.fcgi?cmd=Retrieve&amp;db=PubMed&amp;list_uids=10515252&amp;dopt=Abstract</meta:pubmedRef>
        </meta:publication>

        <meta:neuronDBref>
            <meta:modelName>K channels</meta:modelName>
            <meta:uri>http://senselab.med.yale.edu/senselab/NeuronDB/channelGene2.htm#table3</meta:uri>
        </meta:neuronDBref>

    <!--float EK        = -0.075

    setupalpha {chanpath} X \
        500.0   \
        0.0     \
        0.0     \
        0.0393  \
       -0.0308  \
        500.0   \
        0.0     \
        0.0     \
        0.0393  \
        0.0308  \
        -size 3000 -range -0.1 0.1

    setupalpha {chanpath} Y \
        40.0    \
        0.0     \
        0.0     \
        0.0657  \
        0.00762 \
        40.0    \
        0.0     \
        0.0     \
        0.0657  \
       -0.0686  \
        -size 3000 -range -0.1 0.1>-->

        <current_voltage_relation cond_law="ohmic" ion="k" default_gmax="1.14567" default_erev="-90">

            <q10_settings q10_factor="1" experimental_temp="17.350264793"/>
            <offset value="10"/>

            <gate name="m" instances="3">
                <closed_state id="m0"/>
                <open_state id="m"/>

                <time_course name="tau" from="m0" to="m" expr_form="generic" expr="0.410 * ((exp (( ((v) + 43.5) / (-42.8))))) + 0.167"/>
                <steady_state name="inf" from="m0" to="m" expr_form="sigmoid" rate="1" scale="-19.8" midpoint="-46.7"/>

            </gate>

            <gate name="h" instances="1">
                <closed_state id="h0"/>
                <open_state id="h"/>

                <time_course name="tau" from="h0" to="h" expr_form="generic" expr="10.8 + (0.03 * v) + (1 / (57.9 * (exp (v *0.127)) + (134e-6 * (exp (v * -0.059)))))"/>
                <steady_state name="inf" from="h0" to="h" expr_form="sigmoid" rate="1" scale="8.4" midpoint="-78.8"/>

            </gate>
        </current_voltage_relation>

    </channel_type>
</channelml>
